h := 0.5
z := [1; 1.5; 2; 2.5; 3]
y := [0.69; 1.18; 1.61; 1.98; 2.3]
P(x) := 2.3 + 0.32/h*(x - 3) + (-0.05/(h^2*2!)*(x - 3)*(x - 2.5)) + 0.01/(h^3*3!)*(x - 3)*(x - 2.5)*(x - 2) + 0.01/(h^4*4!)*(x - 3)*(x - 2.5)*(x - 2)*(x - 1.5) collect → 0.00666666666667*x^4 - 0.0466666666667*x^3 - 0.00166666666667*x^2 + 1.15166666667*x - 0.42
P(2.8) = 2.17694
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