'''''''''''''''''''''''''''''''''''''''''''''''''''''''''''''''''''''''''''''''''''''''''''''''''''''''''''''''''''''''''''''''''''''''''''''''''''''''
f(x) := 2*x^3 - 3*x^2 - 12*x + 10
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z := 0
xk := root(f(z), z)
xk = 0.761921
# x = (2^x)/2.2
g(x) := 2.2*x - 2^x
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xk := root(g(z), z)
xk = 0.78112
