f(x) := 5*x - 8*ln(x) - 8
f1(x) := d/dx(f(x))
z := -5
f1(x) → 5 - 8/x
xk := root(f(z), z)
f2(x) := d/dx(f1(x))
xk = 3.68824
f2(x) → 8/x^2
f1 → function
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f(x) := 5*x - 8*ln(x) - 8
f1(x) := d/dx(f(x))
f1(x) → 5 - 8/x
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f2(x) := d/dx(f1(x))
f2(x) → 8/x^2
z := 3
xk := root(f(z), z)
xk = 3.68824
